FINISH
/CLEAR
! 設定參數
               ! Units: m, N
  L    = 60E-3    ! Length
  H    = 10E-3    ! Height
  B    = 6E-3     ! Width
  E    = 200000E6 ! Young's modulus (Pa)
  NU   = 0.3    ! Poisson's ratio
  SIZE = 3E-3       ! Element size,一格佔多少單位
  Q    = 1E6        ! Distributed load (Pa)
  P    = 100    ! Point load

/PREP7 !preprocessor area

  K, 1, 0, -H/2, -B/2
  K, 2, 0,  H/2, -B/2
  K, 3, 0,  H/2,  B/2
  K, 4, 0, -H/2,  B/2
  K, 5, L, -H/2, -B/2
  K, 6, L,  H/2, -B/2
  K, 7, L,  H/2,  B/2
  K, 8, L, -H/2,  B/2
  V, 1, 2, 3, 4, 5, 6, 7, 8

  /VIEW,, 1, 2, 3
  VPLOT
  ET, 1, SOLID45
  MP, EX, 1, E
  MP, NUXY, 1, NU

  TYPE, 1
  MAT, 1 ! 指定MAT為編號一的
  ESIZE, SIZE ! 切的網格尺寸
  VMESH, ALL
  FINISH

/SOLU !solution area

  ! Fixed end
  NSEL, S, LOC, X, 0
  D, ALL, ALL, 0
  ! Distributed load
  NSEL, S, LOC, Y, H/2
  SF, ALL, PRES, Q ! SURFACE FORCE
  NSEL, ALL
  ! Loads at free end
  N1 = NODE(L,-H/2,-B/2)
  N2 = NODE(L,-H/2,B/2)
  F, N1, FY, -P/2
  F, N2, FY, -P/2
  SOLVE
  FINISH

/POST1

  /VIEW,, 0, 0, 1 ! 變更視角
  PLDISP, 2
  PLNSOL, S, X
